////////////////////////////////////////////////////////
// BEGIN
////////////////////////////////////////////////////////
// filename... model_save.glm
// workdir.... /Users/david/GitHub/gridlabd/autotest
// command.... /opt/gridlabd/opt/gridlabd/4.2.1-200428-develop_fix_weather_autotest_usage/bin/gridlabd.bin /Users/david/GitHub/gridlabd/autotest/test_model_save_opt.glm
// created.... Wed Apr 29 10:34:28 2020
// user....... david
// host....... (null)
// modules.... 1
// classes.... 19
// objects.... 0
// options.... MINIMAL

////////////////////////////////////////////////////////

// CLOCK
clock {
	timezone "EST5EDT";
	starttime "2018-01-30 00:00:00 EST";
	stoptime "2018-01-30 00:01:00 EST";
}

////////////////////////////////////////////////////////
// modules
module residential {
	message_flags "DEBUG|VERBOSE";
	default_line_voltage "+240+0d V";
	default_line_current "+0+0j A";
	default_outdoor_temperature "+74 degF";
	default_humidity "+75 %";
	default_solar "+0 Btu/sf";
	default_etp_iterations "100";
	ANSI_voltage_check "TRUE";
	enable_subsecond_models "FALSE";
	deltamode_timestep "+1e+07 ns";
	all_house_delta "FALSE";
	implicit_enduses "NONE";
	implicit_enduse_source "ELCAP1990";
	house_low_temperature_warning "+55 degF";
	house_high_temperature_warning "+95 degF";
	thermostat_control_warning "+4.94066e-324";
	system_dwell_time "+1 s";
	aux_cutin_temperature "+10 degF";
	paneldump_filename "paneldump.csv";
	paneldump_interval "0";
	paneldump_resolution "+0";
}

////////////////////////////////////////////////////////
// classes
class house {
	char1024 issupernode;
}
class waterheater {
	loadshape wh_shape;
}

////////////////////////////////////////////////////////
// objects

////////////////////////////////////////////////////////
// END
////////////////////////////////////////////////////////
