#ifmissing /opt/gridlabd/bin/mdb-schema

#warning mdbtools is not available

#else // found /opt/gridlabd/bin/mdb-schema

#ifexist ../IEEE-13-cyme.mdb
#define DIR=..
#endif // exist ../IEEE-13-cyme.mdb

#input "${DIR:-.}/IEEE-13-cyme.mdb" -o IEEE-13-cyme.glm -t table -f object -p table=CYMLOAD -p class=test -p modules=powerflow,residential -p columns=DeviceNumber:name -p dtypes=NetworkId:int32

#ifexist ../IEEE-13-cyme.glm
#on_exit 0 diff -I '^[#/]' ../IEEE-13-cyme.glm IEEE-13-cyme.glm > gridlabd.diff
#endif // exist ../IEEE-13-cyme.glm

#endif // missing /opt/gridlabd/bin/mdb-schema
